*Heading
** Job name: Ibeam Model name: Model-1
** Generated by: Abaqus/CAE 6.10-1
*Preprint, echo=NO, model=NO, history=NO, contact=NO
**
** PARTS
**
*Part, name=Part-1
*End Part
**
**
** ASSEMBLY
**
*Assembly, name=Assembly
**
*Instance, name=Part-1-1, part=Part-1
          0.,           0.,           0.
          0.,           0.,           0., -0.678598321477356, 0.678598321477356, 0.281084644583813, 62.7994290620055
*Node
      1, 0.0500000007, 0.0199999996,           1.
      2, 0.0500000007,  0.180000007,           1.
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*Element, type=DC3D4
   1,  697,   43,  147,   44
   2,   95,  893, 1021, 1022
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*Nset, nset=_PickedSet2, internal, generate
    1,  1071,     1
*Elset, elset=_PickedSet2, internal, generate
    1,  3109,     1
** Section: Section-1
*Solid Section, elset=_PickedSet2, material=Aluminum
,
*End Instance
**
*Nset, nset=Set-Cold, instance=Part-1-1
   1,   2,   5,   7,   8,  11
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*Elset, elset=Set-Cold, instance=Part-1-1
    3,    8,   28,   42,   53,  363
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*Nset, nset=Set-Hot, instance=Part-1-1
   3,   4,   6,   9,  10,  12
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*Elset, elset=Set-Hot, instance=Part-1-1
   16,   31,   38,   67,   93,   98
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*Nset, nset=_PickedSet6, internal, instance=Part-1-1, generate
    1,  1071,     1
*Elset, elset=_PickedSet6, internal, instance=Part-1-1, generate
    1,  3109,     1
*Nset, nset=Set-OutSurf, instance=Part-1-1, generate
    1,  1020,     1
*Elset, elset=Set-OutSurf, instance=Part-1-1
    3,    6,    8,   11,   13,   15
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*End Assembly
**
** MATERIALS
**
*Material, name=Aluminum
*Conductivity
237.,
*Density
2700.,
*Elastic
 7e+10, 0.35
*Specific Heat
900.,
**
** PREDEFINED FIELDS
**
** Name: Predefined Field-1   Type: Temperature
*Initial Conditions, type=TEMPERATURE
_PickedSet6, 500.
** ----------------------------------------------------------------
**
** STEP: Step-1
**
*Step, name=Step-1, inc=100000
*Heat Transfer, end=PERIOD, deltmx=100.
0.1, 300., 0.0003, 10,
*controls, parameter=time incrementation
 50, 60, 70, 80, 90, 100, 110, 120, 130, 10, 150
**
** BOUNDARY CONDITIONS
**
** Name: BC-1 Type: Temperature
*Boundary
Set-Hot, 11, 11, 3000.
**
** OUTPUT REQUESTS
**
*Restart, write, frequency=0
**
** FIELD OUTPUT: F-Output-1
**
*Output, field, number interval=10
*Node output
NT
*NODE FILE, GLOBAL=NO, nset=Set-OutSurf
NT
*Output, history, frequency=0
*End Step
