/PREP7
N,     1,   0.500000000000,       0.308000000000,        0.00000000000,
N,     2,   0.350000000000,       0.308000000000,        0.00000000000,
N,     3,   0.200000000000,       0.308000000000,        0.00000000000,
N,     4,   0.350000000000,       0.500000000000,        0.00000000000,
N,     5,   0.200000000000,       0.692000000000,        0.00000000000,
N,     6,   0.350000000000,       0.692000000000,        0.00000000000,
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N,    91,   0.350000000000,       0.692000000000,        3.00000000000,
!*
ET,1,SHELL181
!*
KEYOPT,1,1,0
KEYOPT,1,3,2
KEYOPT,1,8,1
KEYOPT,1,9,0
!*
TOFFST,273
!*
MAT,1,
MPREAD,'material','si',' ',LIB
!*
MPLIST,1
TBLIST,ALL,1
!*
sect,1,shell,,flanges
secdata, 0.004,1,0.0,3
secdata, 0.004,1,0.0,3
secdata, 0.004,1,0.0,3
secdata, 0.004,1,0.0,3
secoffset,MID
seccontrol,,,, , , ,
sect,2,shell,,web
secdata, 0.003125,1,0.0,3
secdata, 0.003125,1,0.0,3
secdata, 0.003125,1,0.0,3
secdata, 0.003125,1,0.0,3
secoffset,MID
seccontrol,,,, , , ,
!*
TYPE,   1
MAT,       1
REAL,
ESYS,       0
SECNUM,   1
TSHAP,LINE
!*
E,    1,     8,    10,     2
E,    2,    10,     9,     3
E,    4,    11,    12,     6
E,    2,    10,    11,     4
E,   13,    12,     6,     5
E,    6,    12,    14,     7
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E,   82,    91,    90,    84
!*
EMODIF,3,SEC,2,
EMODIF,4,SEC,2,
EMODIF,9,SEC,2,
EMODIF,10,SEC,2,
EMODIF,15,SEC,2,
EMODIF,16,SEC,2,
EMODIF,21,SEC,2,
EMODIF,22,SEC,2,
EMODIF,27,SEC,2,
EMODIF,28,SEC,2,
EMODIF,33,SEC,2,
EMODIF,34,SEC,2,
EMODIF,39,SEC,2,
EMODIF,40,SEC,2,
EMODIF,45,SEC,2,
EMODIF,46,SEC,2,
EMODIF,51,SEC,2,
EMODIF,52,SEC,2,
EMODIF,57,SEC,2,
EMODIF,58,SEC,2,
EMODIF,63,SEC,2,
EMODIF,64,SEC,2,
EMODIF,69,SEC,2,
EMODIF,70,SEC,2,
!*
TUNIF,20,
TREF,20,
!*
D,2, ,0, , , ,UX, ,UZ, , ,
D,4, ,0, , , ,UX,UY,UZ, , ,
D,6, ,0, , , ,UX, ,UZ, , ,
D,87, ,0, , , ,UX,,, , ,
D,88, ,0, , , ,UX,,, , ,
D,91, ,0, , , ,UX,,, , ,
!*
F,85,FZ,-32500
F,86,FZ,-32500
F,87,FZ,-65000
F,88,FZ,-65000
F,89,FZ,-32500
F,90,FZ,-32500
F,91,FZ,-65000
!*
