*Heading
** Job name: Arch_demo Model name: Model-1
** Generated by: Abaqus/CAE 6.12-1
*Preprint, echo=NO, model=NO, history=NO, contact=NO
**
** PARTS
**
*Part, name=Part-1
*End Part
**
**
** ASSEMBLY
**
*Assembly, name=Assembly
**
*Instance, name=Part-1-1, part=Part-1
*Node
      1,  0.179229856, 0.0599999987,  0.551612794
      2,  0.179229856, 0.00999999978,  0.551612794
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*Element, type=C3D4T
   1, 3235, 1208, 3236, 1213
   2, 1155, 1261, 1162, 3237
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*Nset, nset=_PickedSet2, internal, generate
    1,  4231,     1
*Elset, elset=_PickedSet2, internal, generate
     1,  15173,      1
** Section: Section-1
*Solid Section, elset=_PickedSet2, material=Aluminum
,
*End Instance
**
*Nset, nset=Set-Cold, instance=Part-1-1
   50,   51,   52,   53,   54,   55
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*Elset, elset=Set-Cold, instance=Part-1-1
  9396,  9571,  9575,  9615,  9617,  9625
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*Nset, nset=Set-Hot, instance=Part-1-1
  28,  29,  31,  34,  35,  37
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*Elset, elset=Set-Hot, instance=Part-1-1
 1863, 1971, 2110, 2112, 2138, 2141
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*Nset, nset=Set-OutSurf, instance=Part-1-1
   28,   29,   31,   34,   35,   37
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*Elset, elset=Set-OutSurf, instance=Part-1-1
  1863,  1971,  2110,  2112,  2138,  2141
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*Nset, nset=Set-ends, instance=Part-1-1
   28,   29,   31,   34,   35,   37
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*Elset, elset=Set-ends, instance=Part-1-1
  1863,  1971,  2110,  2112,  2138,  2141
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*Nset, nset=Set-loading, instance=Part-1-1
 8,
*Nset, nset=Set-17, instance=Part-1-1
   3,   4,   6,   8,   9,  11
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*Elset, elset=Set-17, instance=Part-1-1
  109,  113,  118,  120,  121,  298
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*Nset, nset=Set-Ysym, instance=Part-1-1
    1,    4,    5,    6,    7,    9
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*Elset, elset=Set-Ysym, instance=Part-1-1
    76,    88,    89,   101,   113,   114
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*Elset, elset=_Surf-loading_S1, internal, instance=Part-1-1
  399, 1445, 1466, 1476, 1544, 1550
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*Elset, elset=_Surf-loading_S3, internal, instance=Part-1-1
   36,   47,   97,  112,  115,  118
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*Elset, elset=_Surf-loading_S4, internal, instance=Part-1-1
 1545, 1578, 1672, 1721, 1796, 7591, 8321, 8993, 9034, 9041, 9046, 9082, 9102, 9119, 9205
*Elset, elset=_Surf-loading_S2, internal, instance=Part-1-1
 1588, 1627, 8909, 8911, 9023, 9024, 9030, 9065, 9074, 9101, 9122
*Surface, type=ELEMENT, name=Surf-loading
_Surf-loading_S1, S1
_Surf-loading_S3, S3
_Surf-loading_S4, S4
_Surf-loading_S2, S2
*End Assembly
*Amplitude, name=Amp-load
             0.,              0.,             60.,      100000000.
**
** MATERIALS
**
*Material, name=Aluminum
*Conductivity
237.,
*Density
2700.,
*Elastic
 7e+10, 0.35
*Specific Heat
900.,
**
** PREDEFINED FIELDS
**
** Name: Predefined Field-1   Type: Temperature
*Initial Conditions, type=TEMPERATURE
Set-17, 20.
** ----------------------------------------------------------------
**
** STEP: Step-1
**
*Step, name=Step-1, nlgeom=YES
Arch beam pushed down
*Coupled Temperature-displacement, creep=none, deltmx=50.
1., 60., 0.0006, 60.
**
** BOUNDARY CONDITIONS
**
** Name: BC-1 Type: Symmetry/Antisymmetry/Encastre
*Boundary
Set-ends, ZSYMM
** Name: BC-2 Type: Symmetry/Antisymmetry/Encastre
*Boundary
Set-Ysym, YSYMM
** Name: BC-3 Type: Displacement/Rotation
*Boundary
Set-loading, 1, 1
**
** LOADS
**
** Name: Load-2   Type: Pressure
*Dsload, amplitude=Amp-load
Surf-loading, P, 8.
**
** OUTPUT REQUESTS
**
*Restart, write, frequency=0
**
** FIELD OUTPUT: F-Output-1
**
*Output, field, time interval=1.
*Node Output
NT, UT
*Element Output, directions=YES
S,
**
** HISTORY OUTPUT: H-Output-1
**
*Output, history, variable=PRESELECT
*End Step
